<?xml version="1.0"?>
<!-- Generated by Aero-Matic v 1.1
     Inputs:
                horsepower: 0.250767
                     pitch: fixed
            max engine rpm: 9435
        prop diameter (ft): 0.83333333333333
     Outputs:
              max prop rpm: 22515.60
                gear ratio:    0.42
                       Cp0: 0.002731
                       Ct0: 0.003823
       static thrust (lbs):    0.66
-->
<propeller name="prop" version="1.1">
  <!--<ixx>   0.00 </ixx>-->
  <ixx>   0.000041666666 </ixx>
  <!--assuming solid rod of mass 8 g-->
  <diameter unit="IN">  10.0 </diameter>
  <numblades> 2 </numblades>
  <gearratio>  1.0 </gearratio>
  <p_factor>   0.79 </p_factor>
  <table name="C_THRUST" type="internal">
    <tableData><!--experimentally measured-->
		0.05	0.1453
		0.08	0.1435
		0.11	0.141
		0.13	0.1378
		0.16	0.1342
		0.19	0.1303
		0.22	0.1263
		0.25	0.1222
		0.27	0.118
		0.3	0.1136
		0.33	0.1089
		0.36	0.1041
		0.39	0.099
		0.42	0.0939
		0.44	0.0887
		0.47	0.0834
		0.5	0.078
		0.53	0.0726
		0.56	0.067
		0.58	0.0612
		0.61	0.0556
		0.64	0.0501
		0.67	0.0442
		0.7	0.0381
		0.72	0.0319
		0.75	0.026
		0.78	0.0199
		0.81	0.0137
		0.84	0.0086
		0.86	0.0035

			<!--aeromatic generated-->
            <!--0.0   0.0042-->
            <!--0.1   0.0040-->
            <!--0.2   0.0038-->
            <!--0.3   0.0035-->
            <!--0.4   0.0032-->
            <!--0.5   0.0028-->
            <!--0.6   0.0023-->
            <!--0.7   0.0017-->
            <!--0.8   0.0009-->
            <!--1.0  -0.0003-->
            <!--1.2  -0.0016-->
            <!--1.4  -0.0030-->
        </tableData>
  </table>
  <table name="C_POWER" type="internal">
    <tableData>
		0.05	0.0598
		0.08	0.0609
		0.11	0.0618
		0.13	0.0623
		0.16	0.0626
		0.19	0.0629
		0.22	0.0632
		0.25	0.0633
		0.27	0.0633
		0.3	0.0631
		0.33	0.0626
		0.36	0.0618
		0.39	0.0609
		0.42	0.0598
		0.44	0.0584
		0.47	0.0569
		0.5	0.0551
		0.53	0.0532
		0.56	0.051
		0.58	0.0485
		0.61	0.046
		0.64	0.0434
		0.67	0.0404
		0.7	0.0371
		0.72	0.0335
		0.75	0.03
		0.78	0.0263
		0.81	0.0222
		0.84	0.0194
		0.86	0.0164

        </tableData>
  </table>
  <!-- thrust effects of helical tip Mach -->
  <table name="CT_MACH" type="internal">
    <tableData>
            0.85   1.0
            1.05   0.8
        </tableData>
  </table>
  <!-- power-required effects of helical tip Mach -->
  <table name="CP_MACH" type="internal">
    <tableData>
            0.85   1.0
            1.05   1.8
            2.00   1.4
        </tableData>
  </table>
</propeller>
